*Heading
** Job name: pad_nofillet_real_impactor Model name: Model-1
** Generated by: Abaqus/CAE 2018
*Preprint, echo=NO, model=NO, history=NO, contact=NO
** ----------------------------------------------------------------
**
** PART INSTANCE: impactor_mesh_part-1
**
*Node
      1,   46.5143127,   48.1511421,   43.2000008
      2,   33.7863922,   35.4232216,   43.2000008
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*Element, type=C3D8R
  1,  747,  748, 3031, 2986,   55,   54,  688,  687
  2,  748,  749, 3032, 3031,   54,   53,  689,  688
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*Nset, nset=impactor_mesh_part-1_impactor_fullset, generate
    1,  5558,     1
*Elset, elset=impactor_mesh_part-1_impactor_fullset, generate
    1,  4608,     1
** Section: elastic_section
*Solid Section, elset=impactor_mesh_part-1_impactor_fullset, material=ELASTIC
,
** ----------------------------------------------------------------
**
** PART INSTANCE: pad_no_fillet_mesh-1
**
*Node
   5559,   55.7402878,   56.2461357,           0.
   5560,   55.7402878,   56.2461357,           9.
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*Element, type=C3D8
4609,  5559,  5631,  6618,  5664,  5708,  6924, 11814,  6762
4610,  5631,  5632,  6619,  6618,  6924,  6925, 11815, 11814
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*Nset, nset=pad_no_fillet_mesh-1_Set-1, generate
  5559,  22373,      1
*Elset, elset=pad_no_fillet_mesh-1_Set-1, generate
  4609,  19440,      1
*Elset, elset=pad_no_fillet_mesh-1_stiff_set
  4609,  4610,  4611,  4612,  4613,  4614
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*Elset, elset=pad_no_fillet_mesh-1_soft_set
  4615,  4616,  4617,  4624,  4625,  4626
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** Section: stiff_section
*Solid Section, elset=pad_no_fillet_mesh-1_stiff_set, material=ABAQUS_visc_umat_stiff
,
** Section: soft_section
*Solid Section, elset=pad_no_fillet_mesh-1_soft_set, material=ABAQUS_visc_umat_soft
,
*System
*Elset, elset=imp_face_elset
 2126, 2127, 2128, 2129, 2130, 2131
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*Nset, nset=imp_face_nset
   26,   27,   28,   32,   39,   40
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*Elset, elset=pad_zneg_elset
  4609,  4618,  4627,  4636,  4645,  4654
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*Nset, nset=pad_zneg_nset
 5559, 5562, 5563, 5566, 5587, 5588
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*Elset, elset=pad_zpos_elset
  5509,  5510,  5511,  5512,  5513,  5514
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*Nset, nset=pad_zpos_nset
 5567, 5568, 5569, 5570, 5576, 5577
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*Elset, elset=_imp_face_surf_S2
 2126, 2127, 2128, 2129, 2130, 2131
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*Surface, type=ELEMENT, name=imp_face_surf
_imp_face_surf_S2, S2
*Surface, type=NODE, name=pad_zpos_nset_CNS_
pad_zpos_nset
**
** MATERIALS
**
** "soft" is 20C, 0DA
*MATERIAL, NAME=ABAQUS_visc_umat_soft
**
** Temperature should range between 253 K and 333 K.
** Dosage should range between 0 Gy and 16200 Gy. Note, it's assumed
** that 8100 Gy corresponds to 1 Day of X-ray exposure.
**
*USER MATERIAL, CONSTANTS=4
**
** Temperature (K), Dosage (Gy), UMAT logging flag (1 or -1), UMAT logging time, Dummy temperature (K)
293.15, 0.0, -1.0, 10.0, 293.0
**
*DEPVAR
16
*DENSITY
120
**
*MATERIAL, NAME=ABAQUS_visc_umat_stiff
**
** Temperature should range between 253 K and 333 K.
** Dosage should range between 0 Gy and 16200 Gy. Note, it's assumed
** that 8100 Gy corresponds to 1 Day of X-ray exposure.
**
*USER MATERIAL, CONSTANTS=4
**
** Temperature (K), Dosage (Gy), UMAT logging flag (1 or -1), UMAT logging time, Dummy temperature (K)
293.15, 16200.0, -1.0, 10.0, 293.0
**
*DEPVAR
16
*DENSITY
120
*MATERIAL,NAME=ELASTIC
*ELASTIC,TYPE=ISOTROPIC
100000000,0.25
*DENSITY
7500

** ---------- CONTACT DEFINITIONS ----------
*CONTACT PAIR,INTERACTION=SI1,TYPE=NODE TO SURFACE,SMALL SLIDING
pad_zpos_nset_CNS_, imp_face_surf
*SURFACE INTERACTION,NAME=SI1
*SURFACE BEHAVIOR,PRESSURE-OVERCLOSURE=LINEAR
7000000, 35
*FRICTION
0.25,50000
** ----------------------------------------------------------------
**
** STEP: Step-1
**
*Step, NLGEOM=YES, INC=100000
*Static, SOLVER=SPOOLES
5e-10, 5e-5, 1e-11, 1e-9
**
** BOUNDARY CONDITIONS
**
** Name: BC-1 Type: Displacement/Rotation
*Boundary
pad_zneg_nset, 1, 1,
pad_zneg_nset, 2, 2,
pad_zneg_nset, 3, 3,
** Name: BC-2 Type: Velocity/Angular velocity
*Boundary, type=VELOCITY
impactor_mesh_part-1_impactor_fullset, 3,, -300.
**
** OUTPUT REQUESTS
**
*NODE FILE, GLOBAL=YES, FREQUENCY=4
U,RF
*EL FILE, FREQUENCY=4
S,E
*End Step
